# OpenSim document version 30516
Model UPAT_Eye_Model_Passive_Pulleys_v4:
  gravity: 0 -9.8066 0
  length_units: meters
  force_units: N
  credits:
    The model was created by Constantinos Filip as part of the course requirement in Modeling and Simulation (Biomedical Engineering, University of Patras) 2018. The mode is based on J. Iskander et al. 2018. The OpenSim controller plugin were prepared in collaboration with Dimitar Stanev. License: Creative Commons (CCBY 4.0). You are free to distribute, remix, tweak, and build upon this work, even commercially, as long as you credit us for the original creation (http://creativecommons.org/licenses/by/4.0/). SimTK project: https://simtk.org/projects/eye
  publications:
    K. Filip, D. Stanev, and K. Moustakas (2018). An Open-Source OpenSim Oculomotor Model for Kinematics and Dynamics Simulation, arXiv:1807.07332 [physics.bio-ph]. Iskander, J., Hossny, M., Nahavandi, S., del Porto, L., Porto, L. (2018). An ocular biomechanic model for dynamic simulation of different eye movements. Journal of Biomechanics. https://doi.org/10.1016/j.jbiomech.2018.02.006.
  Ground: meshes=(ground_skull.vtp ground_jaw.vtp)
  BodySet:
    Body r_eye: mass=0.0075 [kg] mass_center=(0 0 0) inertia=(4.32e-7 4.32e-7 4.32e-7 0 0 0)
        meshes=(sclera.obj pupil.obj)
      WrapEllipsoid right_eye_wrap: xyz_body_rotation=(0.7854 0 0) translation=(0 0 0) quadrant=all
          dimensions=(0.012 0.012 0.012)
      WrapEllipsoid right_eye_wrap2: translation=(0 0 0) quadrant=all dimensions=(0.012 0.012 0.012)
    Body l_eye: mass=0.0075 mass_center=(0 0 0) inertia=(4.32e-7 4.32e-7 4.32e-7 0 0 0) meshes=(sclera.obj pupil.obj)
  JointSet:
    CustomJoint Right_Eye_Joint: socket_parent_frame_connectee_name=../ground
        socket_child_frame_connectee_name=../r_eye
      Coordinate r_eye_add_abd: default_value=0 range=(-0.698132 0.698132) clamped=false
      Coordinate r_eye_sup_inf: default_value=0 range=(-0.698132 0.698132) clamped=false
      Coordinate r_eye_inc_exc: default_value=0 range=(-0.174533 0.174533) clamped=false
      SpatialTransform: axes_held_at_zero=(translation1 translation2 translation3)
        TransformAxis rotation1: coordinates=r_eye_add_abd axis=(0 1 0) LinearFunction(coefficients=1 0)
        TransformAxis rotation2: coordinates=r_eye_sup_inf axis=(0 0 1) LinearFunction(coefficients=1 0)
        TransformAxis rotation3: coordinates=r_eye_inc_exc axis=(1 0 0) LinearFunction(coefficients=1 0)
    CustomJoint Left_Eye_Joint: socket_parent_frame_connectee_name=ground_offset
        socket_child_frame_connectee_name=../l_eye
      Coordinate l_eye_add_abd: default_value=0 range=(-0.698132 0.698132) clamped=false
      Coordinate l_eye_sup_inf: default_value=0 range=(-0.698132 0.698132) clamped=false
      Coordinate l_eye_inc_exc: default_value=0 range=(-0.174533 0.174533) clamped=false
      PhysicalOffsetFrame ground_offset: socket_parent_connectee_name=../../ground translation=(0 0 -0.062) [meters]
      SpatialTransform: axes_held_at_zero=(translation1 translation2 translation3)
        TransformAxis rotation1: coordinates=l_eye_add_abd axis=(0 1 0) LinearFunction(coefficients=1 0)
        TransformAxis rotation2: coordinates=l_eye_sup_inf axis=(0 0 1) LinearFunction(coefficients=1 0)
        TransformAxis rotation3: coordinates=l_eye_inc_exc axis=(1 0 0) LinearFunction(coefficients=1 0)
  ControllerSet:
    FixationController fixation_controller: thetaH=15 [degrees] thetaV=-15 [degrees] kpH=50 kdH=1.5 kpV=50 kdV=1.5
        kpT=100 kdT=0.5 saccade_onset=0.5 [s] saccade_velocity=100
  ConstraintSet:
    CoordinateCouplerConstraint l_eye_add_abd_con: independent_coordinate_names=r_eye_add_abd
        dependent_coordinate_name=l_eye_add_abd scale_factor=1
        coupled_coordinates_function=LinearFunction(coefficients=1 0)
    CoordinateCouplerConstraint l_eye_sup_inf_con: independent_coordinate_names=r_eye_sup_inf
        dependent_coordinate_name=l_eye_sup_inf scale_factor=1
        coupled_coordinates_function=LinearFunction(coefficients=1 0)
    CoordinateCouplerConstraint l_eye_inc_exc_con: independent_coordinate_names=r_eye_inc_exc
        dependent_coordinate_name=l_eye_inc_exc scale_factor=1
        coupled_coordinates_function=LinearFunction(coefficients=1 0)
  ForceSet:
    Millard2012EquilibriumMuscle [values shared by the 6 below unless stated]: optimal_force=1
        pennation_angle_at_optimal=0 [radians] ignore_tendon_compliance=true fiber_damping=0 default_activation=0
        activation_time_constant=0.005 [seconds] deactivation_time_constant=0.005 [seconds] minimum_activation=0
      ActiveForceLengthCurve: min_norm_active_fiber_length=0.55 transition_norm_fiber_length=0.7
          max_norm_active_fiber_length=1.8 shallow_ascending_slope=2.4 minimum_value=0
      ForceVelocityCurve: concentric_slope_at_vmax=0 concentric_slope_near_vmax=0.25 isometric_slope=5
          eccentric_slope_at_vmax=0 eccentric_slope_near_vmax=0.15 max_eccentric_velocity_force_multiplier=1.4
          concentric_curviness=0.6 eccentric_curviness=0.9
      FiberForceLengthCurve: strain_at_zero_force=-0.18 strain_at_one_norm_force=0.4
      TendonForceLengthCurve: strain_at_one_norm_force=1
    Millard2012EquilibriumMuscle r_Lateral_Rectus: max_isometric_force=1.471 optimal_fiber_length=0.04898
        tendon_slack_length=0.0084 max_contraction_velocity=3.8484 default_fiber_length=0.0513
      PathPoint RLR-Origin-P1: socket_parent_frame_connectee_name=../../../ground (-0.034 0.0006 -0.013)
      PathPoint RRL-Pulley-P2: socket_parent_frame_connectee_name=../../../ground (-0.0102 0.0003 0.012)
      PathPoint RLR-Insertion-P3: socket_parent_frame_connectee_name=../../../r_eye (0.0065 0 0.0101)
      PathWrap: wrap_object=right_eye_wrap method=axial
    Millard2012EquilibriumMuscle r_Medial_Rectus: max_isometric_force=1.574 optimal_fiber_length=0.04084
        tendon_slack_length=0.0038 max_contraction_velocity=4.6155 default_fiber_length=0.0398
      PathPoint RMR-Origin-P1: socket_parent_frame_connectee_name=../../../ground (-0.03 0.0006 -0.017)
      PathPoint RML-Pulley-P2: socket_parent_frame_connectee_name=../../../ground (-0.0053 0.00014 -0.0146)
      PathPoint RMR-Insertion-P3: socket_parent_frame_connectee_name=../../../r_eye (0.0088 0 -0.0096)
      PathWrap: wrap_object=right_eye_wrap method=axial
    Millard2012EquilibriumMuscle r_Superior_Rectus: max_isometric_force=1.1768 optimal_fiber_length=0.04487
        tendon_slack_length=0.0054 max_contraction_velocity=4.2009 default_fiber_length=0.04495
      PathPoint RSR-Origin-P1: socket_parent_frame_connectee_name=../../../ground (-0.0317 0.0036 -0.016)
      PathPoint RSL-Pulley-P2: socket_parent_frame_connectee_name=../../../ground (-0.0092 0.012 -0.002)
      PathPoint RSR-Insertion-P3: socket_parent_frame_connectee_name=../../../r_eye (0.0076 0.0104 0)
      PathWrap: wrap_object=right_eye_wrap method=axial
    Millard2012EquilibriumMuscle r_Inferior_Rectus: max_isometric_force=1.4269 optimal_fiber_length=0.04549
        tendon_slack_length=0.0048 max_contraction_velocity=4.1437 default_fiber_length=0.0449
      PathPoint RIR-Origin-P1: socket_parent_frame_connectee_name=../../../ground (-0.0317 -0.0024 -0.016)
      PathPoint RIL-Pulley-P2: socket_parent_frame_connectee_name=../../../ground (-0.0042 -0.0128 -0.0042)
      PathPoint RIR-Insertion-P3: socket_parent_frame_connectee_name=../../../r_eye (0.00805 -0.0102 0)
      PathWrap: wrap_object=right_eye_wrap method=axial
    Millard2012EquilibriumMuscle r_Superior_Oblique: max_isometric_force=0.6031 optimal_fiber_length=0.03956
        tendon_slack_length=0.0265 max_contraction_velocity=4.7648 default_fiber_length=0.06137
      PathPoint RIR-Origin-P1: socket_parent_frame_connectee_name=../../../ground (-0.0308342 0.00114521 -0.0164402)
      PathPoint RSO-Pulley-P2: socket_parent_frame_connectee_name=../../../ground (0.0082 0.0122 -0.0152)
      PathPoint RSO-Insertion-P3: socket_parent_frame_connectee_name=../../../r_eye (-0.0044 0.011 0.0029)
      PathWrap: wrap_object=right_eye_wrap2 method=axial
    Millard2012EquilibriumMuscle r_Inferior_Oblique: max_isometric_force=0.559 optimal_fiber_length=0.0411
        tendon_slack_length=0.0015 max_contraction_velocity=4.5863 default_fiber_length=0.03774
      PathPoint RIO-Origin-P1: socket_parent_frame_connectee_name=../../../ground (0.0113 -0.0154 -0.0111)
      PathPoint RIO-Pulley-P2: socket_parent_frame_connectee_name=../../../ground (-0.00718 -0.0135 0)
      PathPoint RIO-Insertion-P3: socket_parent_frame_connectee_name=../../../r_eye (-0.008 0 0.009)
      PathWrap: wrap_object=right_eye_wrap2 method=axial
    ExpressionBasedCoordinateForce add_adb_tissue: coordinate=r_eye_add_abd
        expression=-0.002225*q-34.5297*0.0001*q^3-1*0.002*qdot
    ExpressionBasedCoordinateForce sup_inf_tissue: coordinate=r_eye_sup_inf
        expression=-0.002225*q-34.5297*0.0001*q^3-1*0.002*qdot
    ExpressionBasedCoordinateForce inc_exc_tissue: coordinate=r_eye_inc_exc
        expression=-0.002225*q-34.5297*0.0001*q^3-1*0.002*qdot
  MarkerSet:
    Marker r_eye_marker: socket_parent_frame_connectee_name=../r_eye (0.3 0 0)
    Marker l_eye_marker: socket_parent_frame_connectee_name=../l_eye (0.3 0 0)
